M := transpose([
    10.6, 10.9, 15.2, 17.3, 18.2, 16.1, 13.2, 17.1, 22.9, 21.4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])
n := length(M) = 50
x1 := sort(M) = [
    10.3; 10.6; 10.6; 10.7; 10.8; 10.9; 10.9; 11.1; 11.4; 11.8
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]
R := max(x1) - min(x1) = 13.1
k := floor(sqrt(n)) = 7
m6 := 2
d := R/k = 1.87143
m7 := 5
m1 := 10
I1 := [min(x1), min(x1) + d] = [10.3, 12.1714]
m2 := 1
I2 := [max(I1), max(I1) + d] = [12.1714, 14.0429]
m3 := 10
I3 := [max(I2), max(I2) + d] = [14.0429, 15.9143]
m4 := 9
I4 := [max(I3), max(I3) + d] = [15.9143, 17.7857]
m5 := 13
I5 := [max(I4), max(I4) + d] = [17.7857, 19.6571]
p1 := m1/n = 0.2
I6 := [max(I5), max(I5) + d] = [19.6571, 21.5286]
p2 := m2/n = 0.02
I7 := [max(I6), max(I6) + d] = [21.5286, 23.4]
p3 := m3/n = 0.2
p4 := m4/n = 0.18
p5 := m5/n = 0.26
p6 := m6/n = 0.04
p7 := m7/n = 0.1
I1_mid := (10.3 + 12.171)/2 = 11.2355
I2_mid := (12.171 + 14.043)/2 = 13.107
I3_mid := (14.043 + 15.914)/2 = 14.9785
I4_mid := (15.914 + 17.786)/2 = 16.85
I5_mid := (17.786 + 19.657)/2 = 18.7215
I6_mid := (19.657 + 21.529)/2 = 20.593
I7_mid := (21.529 + 23.4)/2 = 22.4645
A := [I1_mid; I2_mid; I3_mid; I4_mid; I5_mid; I6_mid; I7_mid] = [11.2355; 13.107; 14.9785; 16.85; 18.7215; 20.593; 22.4645]
# Построение эмпирической функции распределения
z1 := p1 = 0.2
z2 := p1 + p2 = 0.22
z3 := p1 + p2 + p3 = 0.42
z4 := p1 + p2 + p3 + p4 = 0.6
z5 := p1 + p2 + p3 + p4 + p5 = 0.86
z6 := p1 + p2 + p3 + p4 + p5 + p6 = 0.9
z7 := p1 + p2 + p3 + p4 + p5 + p6 + p7 = 1
# Дискретный статистический ряд, в котором указаны середины интервалов a, частоты p и накопленные частоты z .
a := [11.236, 13.107, 14.979, 16.85, 18.722, 20.593, 22.465]
p := [0.2, 0.02, 0.2, 0.18, 0.26, 0.04, 0.1]
z := [0.2, 0.22, 0.42, 0.6, 0.86, 0.9, 1]
i := 0 .. 6
F_1 := [11.236; 13.107; 14.979; 16.85; 18.722; 20.593; 22.465]
B := [0.2; 0.22; 0.42; 0.6; 0.86; 0.9; 1]
# [plot: B[i] vs F_1[i]]
p := [0.2; 0.02; 0.2; 0.18; 0.26; 0.04; 0.1]
# Построение эмпирической плотности распределения
f1 := p1/d = 0.10687
f2 := p2/d = 0.010687
f3 := p3/d = 0.10687
f4 := p4/d = 0.0961832
f5 := p5/d = 0.138931
f6 := p6/d = 0.021374
f7 := p7/d = 0.0534351
q := 16.476
s := 3.465
f(x) := 1/(sqrt(2*π)*s)*e^(-(x - q)^2/(2*s^2))
F_2 := [0.107; 0.011; 0.107; 0.096; 0.139; 0.021; 0.053]
# [plot: F_2[i], f(F_1[i]) vs F_1[i]]
# Ряд распределения эмпирической плотности примет вид
a := [11.236, 13.107, 14.979, 16.85, 18.722, 20.593, 22.465]
f_ := [0.107, 0.011, 0.107, 0.096, 0.139, 0.021, 0.053]
# Получение точечных статистических оценок
x_1 := I1_mid*p1 + I2_mid*p2 + I3_mid*p3 + I4_mid*p4 = 8.53794
x_2 := I5_mid*p5 + I6_mid*p6 + I7_mid*p7 = 7.93776
x_ := x_1 + x_2 = 16.4757
P := [z1; z2; z3; z4; z5; z6; z7] = [0.2; 0.22; 0.42; 0.6; 0.86; 0.9; 1]
sum(F_1[i]^2*p[i], i = 0 .. k - 1) = 283.229
S_1 := I1_mid^2*p1 + I2_mid^2*p2 + I3_mid^2*p3 + I4_mid^2*p4 = 124.66
S_2 := I5_mid^2*p5 + I6_mid^2*p6 + I7_mid^2*p7 - x_^2 = -112.892
S := S_1 + S_2 = 11.7684
s := sqrt(n/(n - 1)*S) = 3.46534
# Выборочную асимметрию вычислим по формуле
Ab_1 := 1/s^3*((I1_mid - x_)^3*p1 + (I2_mid - x_)^3*p2 + (I3_mid - x_)^3*p3) = -0.72607
Ab_2 := 1/s^3*((I4_mid - x_)^3*p4 - (I5_mid - x_)^3*p5 + (I6_mid - x_)^3*p6) = -0.00345279
Ab_3 := 1/s^3*((I7_mid - x_)^3*p7) = 0.516155
Ab_ := Ab_1 + Ab_2 + Ab_3 = -0.213368
# Выборочный эксцесс вычислим по формуле
E_1 := 1/s^4*((I1_mid - x_)^4*p1 + (I2_mid - x_)^4*p2 + (I3_mid - x_)^4*p3) = 1.0706
E_2 := 1/s^4*((I4_mid - x_)^4*p4 - (I5_mid - x_)^4*p5 + (I6_mid - x_)^4*p6) = 0.0338726
E_3 := 1/s^4*((I7_mid - x_)^4*p7) = 0.892018
E := E_1 + E_2 + E_3 - 3 = -1.00351
F(x) := 1/sqrt(2*π)*integral(e^(-t^2/2), t = 0 .. x)
# Проверка гипотезы о нормальном распределении
p_1 := F((12.171 - x_)/s) - F((10.3 - x_)/s) = 0.0697149
p_2 := F((14.043 - x_)/s) - F((12.171 - x_)/s) = 0.134258
p_3 := F((15.914 - x_)/s) - F((14.043 - x_)/s) = 0.19428
p_4 := F((17.786 - x_)/s) - F((15.914 - x_)/s) = 0.21171
p_5 := F((19.657 - x_)/s) - F((17.786 - x_)/s) = 0.173372
p_6 := F((21.529 - x_)/s) - F((19.957 - x_)/s) = 0.0851564
p_7 := F((23.4 - x_)/s) - F((21.529 - x_)/s) = 0.0495375
m1_ := n*p_1 = 3.48574
m2_ := n*p_2 = 6.71291
m3_ := n*p_3 = 9.71401
M_1 := [m1 + m2; m3; m4; m5; m6 + m7] = [11; 10; 9; 13; 7]
m4_ := n*p_4 = 10.5855
m5_ := n*p_5 = 8.66858
m6_ := n*p_6 = 4.25782
m7_ := n*p_7 = 2.47688
M_1_ := [m1_ + m2_; m3_; m4_; m5_; m6_ + m7_] = [10.1987; 9.71401; 10.5855; 8.66858; 6.73469]
χ_2 := sum((M_1[i] - M_1_[i])^2/M_1_[i], i = 0 .. 4) = 2.48359
p_1 := 11/n = 0.22
f_1 := p_1/d = 0.117557
p_2 := 10/n = 0.2
f_2 := p_2/d = 0.10687
p_3 := 9/n = 0.18
f_3 := p_3/d = 0.0961832
p_4 := 13/n = 0.26
f_4 := p_4/d = 0.138931
p_5 := 7/n = 0.14
f_5 := p_5/d = 0.0748092
F_2_ := [f_1; f_2; f_3; f_4; f_5] = [0.117557; 0.10687; 0.0961832; 0.138931; 0.0748092]
F_1_ := [12.1715; 14.979; 16.85; 18.722; 21.5285]
# [plot: F_2_[i], f(F_1_[i]) vs F_1_[i]]
# 2.484 < 9.2, гипотеза о нормальном законе генеральной совокупности принимается
# Проверка истинности по критерию Колмогорова
a_0 := 10.3
Fn_0 := 0
a_1 := 12.171
Fn_1 := 0.2
a_2 := 14.043
Fn_2 := 0.22
a_3 := 15.914
Fn_3 := 0.42
a_4 := 17.786
Fn_4 := 0.6
a_5 := 19.657
Fn_5 := 0.86
a_6 := 21.529
Fn_6 := 0.9
a_7 := 23.4
Fn_7 := 1
F_10.3_1 := F((10.3 - x_)/s) = -0.462636
F_12.171_1 := F((12.171 - x_)/s) = -0.392921
F_14.043_1 := F((14.043 - x_)/s) = -0.258663
F_15.914_1 := F((15.914 - x_)/s) = -0.0643828
F_17.786_1 := F((17.786 - x_)/s) = 0.147328
F_19.657_1 := F((19.657 - x_)/s) = 0.320699
F_21.529_1 := F((21.529 - x_)/s) = 0.427613
F_23.4_1 := F((23.4 - x_)/s) = 0.47715
F_10.3 := 0.5 + F((10.3 - x_)/s) = 0.0373639
F_12.171 := 0.5 + F((12.171 - x_)/s) = 0.107079
F_14.043 := 0.5 + F((14.043 - x_)/s) = 0.241337
F_15.914 := 0.5 + F((15.914 - x_)/s) = 0.435617
F_17.786 := 0.5 + F((17.786 - x_)/s) = 0.647328
F_19.657 := 0.5 + F((19.657 - x_)/s) = 0.820699
F_21.529 := 0.5 + F((21.529 - x_)/s) = 0.927613
F_23.4 := 0.5 + F((23.4 - x_)/s) = 0.97715
|F_10.3 - Fn_0| = 0.0373639
|F_12.171 - Fn_1| = 0.0929212
a1 := 17.786
|F_14.043 - Fn_2| = 0.0213371
|F_15.914 - Fn_3| = 0.0156172
|F_17.786 - Fn_4| = 0.0473275
|F_19.657 - Fn_5| = 0.0393008
|F_21.529 - Fn_6| = 0.0276126
|F_23.4 - Fn_7| = 0.0228499
ζn := sqrt(n)*0.047 = 0.33234
# Данные наблюдений  согласуются с гипотезой о нормальном распределении по обоим критериям
p := [0.1; 0.14; 0.24; 0.2; 0.14; 0.1; 0.08]
a := [I1_mid; I2_mid; I3_mid; I4_mid; I5_mid; I6_mid; I7_mid] = [11.2355; 13.107; 14.9785; 16.85; 18.7215; 20.593; 22.4645]
x_ := sum(a[i]*p[i], i = 0 .. k - 1) = 16.4008
S := sum((a[i]^2)*p[i], i = 0 .. k - 1) - x_^2 = 10.1657
j := 0 .. 49
s := sqrt(n/(n - 1)*S) = 3.22074
q := x_ = 16.4008
f(x) := 1/(sqrt(2*π)*s)*e^(-(x - q)^2/(2*s^2)) + 0.06
# [plot: p[i], f(x1[j]) vs a[i], x1[j]]
