M := transpose([
    10.6, 10.9, 15.2, 17.3, 18.2, 16.1, 13.2, 17.1, 22.9, 21.4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])
# Объем выборки
n := length(M) = 50
x := sort(M) = [
    10.3; 10.6; 10.6; 10.7; 10.8; 10.9; 10.9; 11.1; 11.4; 11.8
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]
x_min := min(M) = 10.3
x_max := max(M) = 23.4
R := x_max - x_min = 13.1
k := floor(sqrt(n)) = 7
d := 1.9
# Границы интервалов статистического ряда и сами
# интервалы
I1 := [x_min, x_min + d] = [10.3, 12.2]
I2 := [max(I1), max(I1) + d] = [12.2, 14.1]
I3 := [max(I2), max(I2) + d] = [14.1, 16]
I4 := [max(I3), max(I3) + d] = [16, 17.9]
I5 := [max(I4), max(I4) + d] = [17.9, 19.8]
I6 := [max(I5), max(I5) + d] = [19.8, 21.7]
I7 := [max(I6), max(I6) + d] = [21.7, 23.6]
# Число выборочных значений, попавших в каждый интервал | Частоты интервального ряда
m1 := 10
p1 := m1/n = 0.2
m2 := 1
m3 := 10
p2 := m2/n = 0.02
m4 := 9
m5 := 13
p3 := m3/n = 0.2
m6 := 2
m7 := 5
p4 := m4/n = 0.18
p5 := m5/n = 0.26
p6 := m6/n = 0.04
# Середины интервалов
p7 := m7/n = 0.1
a1 := (x_min + x_min + d)/2 = 11.25
p := [p1; p2; p3; p4; p5; p6; p7] = [0.2; 0.02; 0.2; 0.18; 0.26; 0.04; 0.1]
a2 := (x_min*2 + d*3)/2 = 13.15
a3 := (x_min*2 + d*5)/2 = 15.05
a4 := (x_min*2 + d*7)/2 = 16.95
a5 := (x_min*2 + d*9)/2 = 18.85
a6 := (x_min*2 + d*11)/2 = 20.75
a7 := (x_min*2 + d*13)/2 = 22.65
a := [a1; a2; a3; a4; a5; a6; a7] = [11.25; 13.15; 15.05; 16.95; 18.85; 20.75; 22.65]
# Накопленные частоты
z1 := p1
z2 := p1 + p2 = 0.22
z3 := p1 + p2 + p3 = 0.42
z4 := p1 + p2 + p3 + p4 = 0.6
z5 := p1 + p2 + p3 + p4 + p5 = 0.86
z6 := p1 + p2 + p3 + p4 + p5 + p6 = 0.9
z7 := p1 + p2 + p3 + p4 + p5 + p6 + p7 = 1
z := [z1; z2; z3; z4; z5; z6; z7] = [0.2; 0.22; 0.42; 0.6; 0.86; 0.9; 1]
i := 0 .. 6
# [plot: z[i] vs a[i]]
# Эмпирическая функция распределения
# Эмпирическая плотность вычисляется по
# формуле
f1 := p1/d = 0.105263
f2 := p2/d = 0.0105263
f3 := p3/d = 0.105263
f4 := p4/d = 0.0947368
f5 := p5/d = 0.136842
f6 := p6/d = 0.0210526
f7 := p7/d = 0.0526316
f := [f1; f2; f3; f4; f5; f6; f7] = [0.105263; 0.0105263; 0.105263; 0.0947368; 0.136842; 0.0210526; 0.0526316]
# Выборочное среднее вычислим по формуле
x_ := mean(M) = 16.436
# исправленное
# выборочное среднее квадратическое отклонение вычислим по
# формуле
s_ := stdev(M) = 3.6845
# Выборочную асимметрию вычислим по формуле
A := 1/s_^3*sum((a[i] - x_)^3*p[i], i = 0 .. k - 1) = 0.0350028
# Выборочный эксцесс вычислим по формуле
E := 1/s_^4*sum((a[i] - x_)^4*p[i], i = 0 .. k - 1) - 3 = -1.26619
a_ := x_ = 16.436
σ := s_ = 3.6845
f_(x) := 1/(sqrt(2*π)*σ)*e^(-(x - a_)^2/(2*σ^2))
j := 0 .. 49
# Эмпирическая плотность распределения,
# полигон частот и нормальная кривая
# [plot: f[i], f_(x[j]) vs a[i], x[j]]
# Проверка гипотезы о нормальном распределении
F(x) := 1/sqrt(2*π)*integral(e^(-t^2/2), t = 0 .. x)
p1 := F((x_min + d - x_)/s_) - F(-∞) = 0.125137
p2 := F((x_min + d*2 - x_)/s_) - F((x_min + d - x_)/s_) = 0.1379
p3 := F((x_min + d*3 - x_)/s_) - F((x_min + d*2 - x_)/s_) = 0.189864
p4 := F((x_min + d*4 - x_)/s_) - F((x_min + d*3 - x_)/s_) = 0.20154
p5 := F((x_min + d*5 - x_)/s_) - F((x_min + d*4 - x_)/s_) = 0.164941
p6 := F((x_min + d*6 - x_)/s_) - F((x_min + d*5 - x_)/s_) = 0.104071
p7 := F(∞) - F((x_min + d*6 - x_)/s_) = 0.0765467
F(∞) = 0.5
p1 + p2 + p3 + p4 + p5 + p6 + p7 = 1
# Теоретические частоты соответственно равны
m1_ := n*p1 = 6.25687
50*0.125 = 6.25
m2_ := n*p2 = 6.89502
50*0.138 = 6.9
m3_ := n*p3 = 9.49319
50*0.19 = 9.5
m4_ := n*p4 = 10.077
50*0.202 = 10.1
m5_ := n*p5 = 8.24704
50*0.165 = 8.25
m6_ := n*p6 = 5.20353
50*0.104 = 5.2
m7_ := n*p7 = 3.82734
50*0.077 = 3.85
M1 := [m1; m3; m4; m5 - 2; m6 + 2 + m2; m7] = [10; 10; 9; 11; 5; 5]
M1_ := [m1_; m3_; m4_; m5_ - 2; m6_ + m2_ + 2; m7_] = [6.25687; 9.49319; 10.077; 6.24704; 14.0985; 3.82734]
# По полученным данным вычислим наблюдаемое значение
# критерия Пирсона
X_набл := sum((M1[i] - M1_[i])^2/M1_[i], i = 0 .. 5) = 12.2288
# По таблице критических точек распределения по уровню значимости α = 0,01 и числу степеней свободы ν = 6 – 3 = 3 найдем критическую точку правосторонней области X_кр = 11.3.
# Так как X_набл < X_кр гипотеза о нормальном распределении отвергается.
# Проверка истинности по критерию Колмогорова
a_1 := x_min = 10.3
a_2 := x_min + d = 12.2
a_3 := x_min + d*2 = 14.1
a_4 := x_min + d*3 = 16
a_5 := x_min + d*4 = 17.9
a_6 := x_min + d*5 = 19.8
a_7 := x_min + d*6 = 21.7
# Значения теоретической функции F0(x)
F_1 := 0.5 + F((a_1 - x_)/s_) = 0.0479208
F_2 := 0.5 + F((a_2 - x_)/s_) = 0.125137
F_3 := 0.5 + F((a_3 - x_)/s_) = 0.263038
F_4 := 0.5 + F((a_4 - x_)/s_) = 0.452902
F_5 := 0.5 + F((a_5 - x_)/s_) = 0.654442
F_6 := 0.5 + F((a_6 - x_)/s_) = 0.819383
F_7 := 0.5 + F((a_7 - x_)/s_) = 0.923453
|z1 - F_1| = 0.152079
|z2 - F_2| = 0.0948627
|z3 - F_3| = 0.156962
|z4 - F_4| = 0.147098
|z5 - F_5| = 0.205558
|z6 - F_6| = 0.0806173
|z7 - F_7| = 0.0765467
# Модуль разностей эмпирической и теоретической функций
# принимает максимальное значение в точке a5 = 17,9
# Тогда значение статистики Колмогорова:
e_p := sqrt(n)*0.206 = 1.45664
# Из таблицы распределения Колмогорова (прил. 5) при заданном уровне значимости q = 0,01 находим λq = 1,627.
# Так как e_p = 1.457< λq = 1,627, основная гипотеза H0 принимается, то есть генеральное распределение считается нормальным.
# Таким образом, данные наблюдений согласуются гипотезой
# о нормальном распределении по одному критерию.
k := 6
d := R/k = 2.18333
I1 := [x_min, x_min + d] = [10.3, 12.4833]
I2 := [max(I1), max(I1) + d] = [12.4833, 14.6667]
I3 := [max(I2), max(I2) + d] = [14.6667, 16.85]
I4 := [max(I3), max(I3) + d] = [16.85, 19.0333]
I5 := [max(I4), max(I4) + d] = [19.0333, 21.2167]
I6 := [max(I5), max(I5) + d] = [21.2167, 23.4]
a1 := (x_min + x_min + d)/2 = 11.3917
a2 := (x_min*2 + d*3)/2 = 13.575
a3 := (x_min*2 + d*5)/2 = 15.7583
a4 := (x_min*2 + d*7)/2 = 17.9417
a5 := (x_min*2 + d*9)/2 = 20.125
a6 := (x_min*2 + d*11)/2 = 22.3083
m1 := 10
p1 := m1/n = 0.2
m2 := 10
p2 := m2/n = 0.2
m3 := 9
p3 := m3/n = 0.18
m4 := 11
p4 := m4/n = 0.22
m5 := 5
p5 := m5/n = 0.1
m6 := 5
p6 := m6/n = 0.1
p := [p1; p2; p3; p4; p5; p6] = [0.2; 0.2; 0.18; 0.22; 0.1; 0.1]
a := [a1; a2; a3; a4; a5; a6] = [11.3917; 13.575; 15.7583; 17.9417; 20.125; 22.3083]
f1 := p1/d = 0.0916031
f2 := p2/d = 0.0916031
f3 := p3/d = 0.0824427
f4 := p4/d = 0.100763
f5 := p5/d = 0.0458015
f6 := p6/d = 0.0458015
f := [f1; f2; f3; f4; f5; f6] = [0.0916031; 0.0916031; 0.0824427; 0.100763; 0.0458015; 0.0458015]
x_ := mean(M) = 16.436
s_ := stdev(M) = 3.6845
A := 1/s_^3*sum((a[i] - x_)^3*p[i], i = 0 .. k - 1) = -0.0877476
E := 1/s_^4*sum((a[i] - x_)^4*p[i], i = 0 .. k - 1) - 3 = -1.47256
a_ := x_ = 16.436
σ := s_ = 3.6845
f_(x) := 1/(sqrt(2*π)*σ)*e^(-(x - a_)^2/(2*σ^2))
# [plot: f[i], f_(x[j]) vs a[i], x[j]]
