M := transpose([
    10.6, 10.9, 15.2, 17.3, 18.2, 16.1, 13.2, 17.1, 22.3, 21.4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])
n := length(M) = 50
x1 := sort(M)
R := max(x1) - min(x1) = 13.1
k := floor(sqrt(n)) = 7
d := R/k = 1.87143
m1 := 10
I1 := [min(x1), min(x1) + d] = [10.3, 12.1714]
I1_mid := (10.3 + 12.171)/2 = 11.2355
m2 := 1
I2 := [max(I1), max(I1) + d] = [12.1714, 14.0429]
m3 := 10
I3 := [max(I2), max(I2) + d] = [14.0429, 15.9143]
I2_mid := (12.171 + 14.043)/2 = 13.107
m4 := 9
I4 := [max(I3), max(I3) + d] = [15.9143, 17.7857]
m5 := 13
I5 := [max(I4), max(I4) + d] = [17.7857, 19.6571]
I3_mid := (14.043 + 15.914)/2 = 14.9785
m6 := 2
I6 := [max(I5), max(I5) + d] = [19.6571, 21.5286]
m7 := 5
I7 := [max(I6), max(I6) + d] = [21.5286, 23.4]
I4_mid := (15.914 + 17.786)/2 = 16.85
p1 := m1/n = 0.2
I5_mid := (17.786 + 19.657)/2 = 18.7215
p2 := m2/n = 0.02
I6_mid := (19.657 + 21.529)/2 = 20.593
p3 := m3/n = 0.2
I7_mid := (21.529 + 23.4)/2 = 22.4645
p4 := m4/n = 0.18
p5 := m5/n = 0.26
A := [I1_mid; I2_mid; I3_mid; I4_mid; I5_mid; I6_mid; I7_mid] = [11.2355; 13.107; 14.9785; 16.85; 18.7215; 20.593; 22.4645]
p6 := m6/n = 0.04
p7 := m7/n = 0.1
z1 := p1 = 0.2
z2 := p1 + p2 = 0.22
z3 := p1 + p2 + p3 = 0.42
z4 := p1 + p2 + p3 + p4 = 0.6
z5 := p1 + p2 + p3 + p4 + p5 = 0.86
z6 := p1 + p2 + p3 + p4 + p5 + p6 = 0.9
z7 := p1 + p2 + p3 + p4 + p5 + p6 + p7 = 1
# Дискретный статистический ряд, в котором указаны середины интервалов a, частоты p и накопленные частоты z .
a := [11.236, 13.107, 14.979, 16.85, 18.722, 20.593, 22.465]
p := [0.2, 0.02, 0.2, 0.18, 0.26, 0.04, 0.1]
z := [0.2, 0.22, 0.42, 0.6, 0.86, 0.9, 1]
F_1 := [11.236; 13.107; 14.979; 16.85; 18.722; 20.593; 22.465]
B := [0.2; 0.22; 0.42; 0.6; 0.86; 0.9; 1]
i := 0 .. 7
# [plot: B[i] vs F_1[i]]
# Построение эмпирической плотности распределения
f1 := p1/d = 0.10687
f2 := p2/d = 0.010687
f3 := p3/d = 0.10687
f4 := p4/d = 0.0961832
f5 := p5/d = 0.138931
f6 := p6/n = 0.0008
f7 := p7/d = 0.0534351
F_2 := [0.107; 0.011; 0.107; 0.096; 0.139; 8*10^-4; 0.053]
# [plot: F_2[i] vs F_1[i]]
# Ряд распределения эмпирической плотности примет вид
a := [11.236, 13.107, 14.979, 16.85, 18.722, 20.593, 22.465]
f_ := [0.107, 0.011, 0.107, 0.096, 0.139, 8*10^-4, 0.053]
# Получение точечных статистических оценок
x_ := I1_mid*p1 + I2_mid*p2 + I3_mid*p3 + I4_mid*p4 + I5_mid*p5 + I6_mid*p6 + I7_mid*p7 = 16.4757
P := [z1; z2; z3; z4; z5; z6; z7] = [0.2; 0.22; 0.42; 0.6; 0.86; 0.9; 1]
S := I1_mid^2*p1 + I2_mid^2*p2 + I3_mid^2*p3 + I4_mid^2*p4 + I5_mid^2*p5 + I6_mid^2*p6 + I7_mid^2*p7 - x_^2 = 11.7684
s := sqrt(n/(n - 1)*S) = 3.46534
# Выборочную асимметрию вычислим по формуле
Ab := 1/s^3*((I1_mid - x_)^3*p1 + (I2_mid - x_)^3*p2 + (I3_mid - x_)^3*p3 + (I4_mid - x_)^3*p4 - (I5_mid - x_)^3*p5 + (I6_mid - x_)^3*p6 + (I7_mid - x_)^3*p7) = -0.213368
# Выборочный эксцесс вычислим по формуле
E := 1/s^4*((I1_mid - x_)^4*p1 + (I2_mid - x_)^4*p2 + (I3_mid - x_)^4*p3 + (I4_mid - x_)^4*p4 - (I5_mid - x_)^4*p5 + (I6_mid - x_)^4*p6 + (I7_mid - x_)^4*p7) - 3 = -1.00351
q := x_ = 16.4757
f(x) := 1/(sqrt(2*π)*s)*e^((x - q)^2/(2*s^2))
F(x) := 1/sqrt(π)*integral(e^(-t^2/2), t = 0 .. x)
# Проверка гипотезы о нормальном распределении
p_1 := F(12.171 - x_) - F(10.3 - x_) = 1.18232e-5
p_2 := F(14.043 - x_) - F(12.171 - x_) = 0.0105854
p_3 := F(15.914 - x_) - F(14.043 - x_) = 0.395509
p_4 := F(17.786 - x_) - F(15.914 - x_) = 0.873691
p_5 := F(19.657 - x_) - F(17.786 - x_) = 0.13338
p_6 := F(21.529 - x_) - F(19.957 - x_) = 0.00035253
p_7 := F(23.4 - x_) - F(21.529 - x_) = 3.07052e-7
m1' := n*p_1 = 0.000591161
m2' := n*p_2 = 0.529269
M_1 := [m1 + m2; m3; m4; m5; m6 + m7] = [11; 10; 9; 13; 7]
m3' := n*p_3 = 19.7754
m4' := n*p_4 = 43.6845
m5' := n*p_5 = 6.66901
m6' := n*p_6 = 0.0176265
m7' := n*p_7 = 1.53526e-5
M_1' := [m1' + m2'; m3'; m4'; m5'; m6' + m7'] = [0.52986; 19.7754; 43.6845; 6.66901; 0.0176418]
χ_2 := sum((M_1[i] - M_1'[i])^2/M_1'[i], i = 0 .. 4) = 3008.78
λ := 1/x_ = 0.0606954
p_i := [
    e^(-λ*14.342) - e^(-λ*10.6);
    e^(-λ*16.213) - e^(-λ*14.342);
    e^(-λ*18.084) - e^(-λ*16.213);
    e^(-λ*19.955) - e^(-λ*18.084);
    e^(-λ*23.697) - e^(-λ*19.955)
] = [-0.106773; -0.0449524; -0.0401267; -0.0358191; -0.0605154]
m_i1' := [-0.107*n; -0.045*n; -0.04*n; -0.036*n; -0.06*n] = [-5.35; -2.25; -2; -1.8; -3]
a := x_ - sqrt(3)*s = 10.4735
b := x_ + sqrt(3)*s = 22.4779
f_x := 1/(b - a) = 0.0833034
m_i2' := [
    n*(14.342 - 10.6)/(b - a);
    n*(16.213 - 14.342)/(b - a);
    n*(18.084 - 16.213)/(b - a);
    n*(19.955 - 18.084)/(b - a);
    n*(23.697 - 19.955)/(b - a)
] = [15.5861; 7.79304; 7.79304; 7.79304; 15.5861]
ζ_1 := sqrt(n)*max*|□|  # error: Отсутствует элемент или выражение.
