# Исходные данные:
n := 30
x_i := transpose([8.1, 8, 7.8, 7.6, 7.7, 7.7, 7, 7.3, 7.1, 6.6, 6.6, 6.2, 6.3, 6.3, 6.1, 5.9, 5.9, 5.9, 6.2, 6.3, 6.3, 7.6, 6.2, 7, 6.6, 6.9, 8, 6.2, 6.9, 6.9])
y_i := transpose([16.8, 16.8, 16.7, 16.7, 16.6, 16.6, 16.6, 16.6, 16.6, 16.4, 16.4, 16.4, 16.3, 16.3, 16.3, 16.3, 16.3, 16.4, 16.6, 16.7, 16.7, 17.8, 19.1, 20.5, 20.7, 20.9, 21.2, 20.9, 21.2, 20.6])
# Получение уравнений линейной регрессии методом
# наименьших квадратов
x_ := 1/n*sum(x_i[i], i = 0 .. n - 1) = 6.84
x2_ := 1/n*sum((x_i^2)[i], i = 0 .. n - 1) = 47.264
y_ := 1/n*sum(y_i[i], i = 0 .. n - 1) = 17.6667
xy_ := 1/n*sum(x_i[i]*y_i[i], i = 0 .. n - 1) = 120.986
y2_ := 1/n*sum((y_i^2)[i], i = 0 .. n - 1) = 315.498
A1 := [x2_, x_; x_, 1]
B1 := [xy_; y_]
A1^-1*B1 = [0.305184; 15.5792]
a := 0.305
b := 15.579
# Уравнение регрессии имеет вид
y := 0.305*x + 15.579  # error: Эта переменная не определена. Проверьте правильность установки обозначения.
C1 := [y2_, y_; y_, 1]
D1 := [xy_; x_]
C1^-1*D1 = [0.0431074; 6.07844]
c := 0.043
d := 6.078
# Уравнение регрессии X на Y имеет вид
x := 0.043*y + 6.078  # error: Эта переменная не определена. Проверьте правильность установки обозначения.
# Оценка выборочного коэффициента корреляции.
S_x := sqrt(x2_ - x_^2) = 0.691665
S_y := sqrt(y2_ - y_^2) = 1.84035
# вычислим выборочный корреляционный момент (выборочная ковариация)
K_xy := xy_ - x_*y_ = 0.146
# Тогда выборочный коэффициент корреляции
r := K_xy/(S_x*S_y) = 0.114698
# Уравнения выборочных регрессий Y на Х и Х на Y в терминах корреляционного анализа примут вид
i := 0 .. 20
y_x := y_ + r*S_y/S_x*(x - x_)  # error: Эта переменная не определена. Проверьте правильность установки обозначения.
f1(x) := 15.5755 + 0.3058*x
x_y := x_ + r*S_x/S_y*(y - y_)  # error: Эта переменная не определена. Проверьте правильность установки обозначения.
f2(y) := 6.0759 + 0.04325*y
# Эти прямые пересекаются в точке (6.84;17.667).
# Корреляционное поле и графики регрессий.
#
# Построим корреляционное поле и уравнения линейной регрессии Y на X и X на Y
y__ := transpose([0, 1, 2, 3, 4, 5, 6, 7, 8, 9, 10, 11, 12, 13, 14, 15, 16, 17, 18, 19])
x__ := transpose([0, 1, 2, 3, 4, 5, 6, 7, 8, 9, 10])
# [plot: f1(x__[i]), y__[i] vs x__[i], f2(y__[i])]
# Проверка значимости уравнения регрессии y = ax + b.
S2_R := sum(((a*x_i[i] + b) - y_)^2, i = 0 .. n - 1)/(2 - 1) = 1.33516
S_2 := sum((y_i[i] - (a*x_i[i] + b))^2, i = 0 .. n - 1)/(n - 2) = 3.58107
F_расч := S2_R/S_2 = 0.372838
# Согласно критерию Фишера – Снедекера, уравнение регрессии y = ax + b является значимым при уровне значимости α, если наблюдаемое значение статистики Fрасч > Fкр. Табличное значение Fкр = 4,2 (прил. 3) для уровня значимости α = 0,05 при k1 = l – 1 = 2 – 1 = 1 и k2 = n – l = 30 – 2 = 28  (l – число оцениваемых параметров уравнения регрессии).Так как Fрасч < Fкр уравнение регрессии не является значимым
# Доверительные интервалы для коэффициентов a и b.
# Среднеквадратические отклонения sa и sb коэффициентов a и b, определяются по формулам
S_a := sqrt(sum((y_i[i] - (a*x_i[i] + b))^2, i = 0 .. n - 1)/((n - 2)*sum((x_i[i] - x_)^2, i = 0 .. n - 1))) = 0.499517
S_b := sqrt(sum((y_i[i] - (a*x_i[i] + b))^2, i = 0 .. n - 1)/((n - 2)*n)) = 0.345498
# При γ = 0,95, k = n – 2 = 28, tγ = 2,04 (прил. 2).
# Находим доверительный интервал коэффициента a
a - 2.04*S_a = -0.714015
a + 2.04*S_a = 1.32401
-0.714 ≤ a_ист ≤ 1.324
b - 2.04*S_b = 14.8742
b + 2.04*S_b = 16.2838
14.874 ≤ b_ист ≤ 16.284
# Проверка значимости коэффициента корреляции
# Проверим гипотезу о значимости выборочного коэффициента корреляции r = 0,115(при α = 0,05). Для проверки гипотезы H0:ρ = 0 вычислим статистический
# критерий
T_набл := r*sqrt(n - 2)/nthroot(1 - r^2, 1) = 0.615017
# В тaблице критических распределений Стьюдента при γ=1-α=0.95 и k=n-2=28 (Прил.2)
t_кр := 2.05
# Так как |T_набл| < t_кр, то нулевую гитопезу H0: = 0 можно подтвердить
# Таким образом, выборочное значение коэффициента корреляции r = 0,115 оказалось статистически незначимым
